OpenVSP model (file version 5), 2 components.
Geometry view with OpenVSP parameter names; values to 6 digits, angles in degrees, lengths in the model's unit.
Overall bounding box: X_Min=0 X_Len=30 Y_Min=-9 Y_Len=18 Z_Min=-1.5 Z_Len=3

Fuselage "FuselageGeom"
  location (X Y Z) 0 0 0, rotation 0 0 0
  bounding box size 30 2.70416 3
  Design: Length=10
  cross sections:
    n  XLocPercent  YLocPercent  ZLocPercent  shape
    0  0            0            0            point
    1  0.25         0            0            rounded rectangle RoundRectXSec_KeyCorner=1 RoundRectXSec_Radius=0.35 RoundRectXSec_RadiusBL=0.2 RoundRectXSec_RadiusBR=0.09 RoundRectXSec_RadiusTL=0.2 RoundRect_Keystone=0.57143 RoundedRect_Height=0.9 RoundedRect_RadiusSymmetryType=1 RoundedRect_Width=1.12
    2  0.5          0            0            rounded rectangle RoundRectXSec_KeyCorner=1 RoundRectXSec_Radius=0.38 RoundRectXSec_RadiusBL=0.2 RoundRectXSec_RadiusBR=0.2 RoundRectXSec_RadiusTL=0.2 RoundRect_Keystone=0.58929 RoundedRect_Height=1.05 RoundedRect_RadiusSymmetryType=3 RoundedRect_Width=1.25
    3  0.75         0            0            rounded rectangle RoundRectXSec_KeyCorner=1 RoundRectXSec_Radius=0.38 RoundRectXSec_RadiusBL=0.2 RoundRectXSec_RadiusBR=0.2 RoundRectXSec_RadiusTL=0.2 RoundRect_Keystone=0.60357 RoundedRect_Height=0.98 RoundedRect_RadiusSymmetryType=3 RoundedRect_Width=1.25
    4  1            0            0            point

Wing "WingGeom"
  location (X Y Z) 3.72726 0 0, rotation 0 0 0
  symmetric about XZ
  bounding box size 3.81048 6.23765 0.460556
  totals: TotalSpan=6.23861 TotalProjectedSpan=6.23765 TotalChord=2.63406 TotalArea=12.9881 TotalAR=2.99568 MAC=2.49853
  root: chord 3.80461, twist 0, airfoil file "data/Airfoil.dat"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 BaseThickChord=0.139565 ThickChord=0.12
  sections:
    n  Span      Root_Chord  Tip_Chord  Area     Sweep    Sweep_Location  Dihedral  Twist  Twist_Location  tip airfoil
    1  0.519884  3.80461     3.12002    1.8      0        1               1.00268   0      0.25            airfoil file "data/Airfoil.dat"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 BaseThickChord=0.139565 ThickChord=0.139565
    2  2.59942   3.12002     0.4916     4.69406  37.1678  0.25            1.00268   0      0.25            as above
  structure "WingGeom_Struct0": Skin
