** Calculix structure data file generated from OpenVSP 3.43.0
** PodGeom_Struct0
** Num_Nodes:       13538
** Num_Els:         4512
** Num_Tris:        0
** Num_Quads:       4512
** Num_Beams:       0
** Node_Offset:     0
** Element_Offset:  0

** Skin PodGeom_Struct0
*NODE, NSET=NSkin_PodGeom_Struct0
1,0.000000,0.000000,0.000000
2,0.019311,0.000000,0.023578
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
** Skin PodGeom_Struct0
*ELEMENT, TYPE=S8, ELSET=ESkin_PodGeom_Struct0_0
2,1,2,3,4,5,6,7,8
3,9,10,3,2,11,12,6,13
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
** Properties PodGeom_Struct0

*SHELL SECTION, ELSET=ESkin_PodGeom_Struct0_0, MATERIAL=Aluminum_6061-T6, ORIENTATION=OSkin_PodGeom_Struct0_0
0.00833333

*ORIENTATION, NAME=OSkin_PodGeom_Struct0_0, SYSTEM=RECTANGULAR
1.000000,0.000000,0.000000,0.0,0.0,1.0


** Materials
*MATERIAL, NAME=Aluminum_6061-T6
*DENSITY
5.26338
*ELASTIC, TYPE=ISO
1.4256e+09, 0.33
*EXPANSION, TYPE=ISO
1.3e-05
