OpenVSP model (file version 5), 4 components.
Geometry view with OpenVSP parameter names; values to 6 digits, angles in degrees, lengths in the model's unit.
Overall bounding box: X_Min=0 X_Len=10 Y_Min=-5.48115 Y_Len=10.9623 Z_Min=-0.703475 Z_Len=2.34674

Fuselage "FuselageGeom"
  location (X Y Z) 0 0 0, rotation 0 0 0
  bounding box size 10 1.71518 1.40695
  Design: Length=10
  cross sections:
    n  XLocPercent  YLocPercent  ZLocPercent  shape
    0  0            0            0            point
    1  0.25         0            0            rounded rectangle RoundRectXSec_KeyCorner=1 RoundRectXSec_Radius=0.35 RoundRectXSec_RadiusBL=0.09 RoundRectXSec_RadiusBR=0.09 RoundRectXSec_RadiusTL=0.35 RoundRect_Keystone=0.57143 RoundedRect_Height=1.2 RoundedRect_RadiusSymmetryType=1 RoundedRect_Width=1.2
    2  0.5          0            0            rounded rectangle RoundRectXSec_Radius=0.38 RoundRect_Keystone=0.58929 RoundedRect_Height=1.4 RoundedRect_Width=1.6
    3  0.75         0            0            rounded rectangle RoundRectXSec_Radius=0.38 RoundRect_Keystone=0.60357 RoundedRect_Height=1.2 RoundedRect_Width=1.6
    4  1            0            0            point

Wing "WingGeom"
  location (X Y Z) 3.81026 0 0, rotation 0 0 0
  symmetric about XZ
  bounding box size 4.3875 10.9623 0.317854
  totals: TotalSpan=10.964 TotalProjectedSpan=10.9623 TotalChord=1.5288 TotalArea=14.7514 TotalAR=8.14647 MAC=1.55776
  root: chord 2.62576, twist 0, airfoil file "data/Airfoil.dat"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 BaseThickChord=0.139565 ThickChord=0.12
  sections:
    n  Span     Root_Chord  Tip_Chord  Area     Sweep  Sweep_Location  Dihedral  Twist  Twist_Location  tip airfoil
    1  1.72834  2.62576     1.42441    3.50003  0      1               1.00268   0      0.25            airfoil file "data/Airfoil.dat"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 BaseThickChord=0.139565 ThickChord=0.139565
    2  3.75365  1.42441     0.640603   3.87567  32     0.25            1.00268   0      0.25            as above
  structure "WingGeom_Struct0": Skin

Wing "Horizontal_Stabilizer"
  location (X Y Z) 8 0 0.2, rotation 0 0 0
  symmetric about XZ
  bounding box size 1.86603 2.45746 0.985437
  totals: TotalSpan=3 TotalProjectedSpan=2.45746 TotalChord=1.25 TotalArea=3.75 TotalAR=1.61042 MAC=1.26667
  root: chord 1.5, twist 0, NACA 4-series Camber=0 CamberLoc=0.2 ThickChord=0.1
  sections:
    n  Span  Root_Chord  Tip_Chord  Area   Sweep  Sweep_Location  Dihedral  Twist  Twist_Location  tip airfoil
    1  1.5   1.5         1          1.875  30     0               35        0      0.25            as above

Stack "Fuselage_Engine"
  location (X Y Z) 6.5 0 1.1, rotation 0 0 0
  bounding box size 3.59862 1.08655 1.08654
  cross sections:
    n  XDelta  YDelta  ZDelta  shape
    0  0       0       0       super ellipse Super_Height=0.71 Super_M=2 Super_MaxWidthLoc=-0.4 Super_N=2 Super_Width=0.71
    1  2.2     0       0       super ellipse Super_Height=0.53 Super_M=2 Super_MaxWidthLoc=-0.4 Super_N=2 Super_Width=0.53
    2  -2.2    0       0       super ellipse Super_Height=0.71 Super_M=2 Super_MaxWidthLoc=-0.4 Super_N=2 Super_Width=0.71

VSPAERO settings (reference component "WingGeom"): Sref=14.7514 bref=10.964 cref=1.55776 Xcg=0 Ycg=0 Zcg=0 AlphaStart=2 AlphaEnd=10 AlphaNpts=1 BetaStart=0 BetaEnd=0 BetaNpts=1 MachStart=0.5 MachEnd=0 MachNpts=1 ReCref=1e+07 Vinf=100 Rho=0.002377
