OpenVSP model (file version 5), 5 components.
Geometry view with OpenVSP parameter names; values to 6 digits, angles in degrees, lengths in the model's unit.
Overall bounding box: X_Min=0 X_Len=10 Y_Min=-4.40657 Y_Len=8.81314 Z_Min=-0.703475 Z_Len=2.34674

Fuselage "FuselageGeom"
  location (X Y Z) 0 0 0, rotation 0 0 0
  bounding box size 10 1.71518 1.40695
  Design: Length=10
  cross sections:
    n  XLocPercent  YLocPercent  ZLocPercent  shape
    0  0            0            0            point
    1  0.25         0            0            rounded rectangle RoundRectXSec_KeyCorner=1 RoundRectXSec_Radius=0.35 RoundRectXSec_RadiusBL=0.09 RoundRectXSec_RadiusBR=0.09 RoundRectXSec_RadiusTL=0.35 RoundRect_Keystone=0.57143 RoundedRect_Height=1.2 RoundedRect_RadiusSymmetryType=1 RoundedRect_Width=1.2
    2  0.5          0            0            rounded rectangle RoundRectXSec_Radius=0.38 RoundRect_Keystone=0.58929 RoundedRect_Height=1.4 RoundedRect_Width=1.6
    3  0.75         0            0            rounded rectangle RoundRectXSec_Radius=0.38 RoundRect_Keystone=0.60357 RoundedRect_Height=1.2 RoundedRect_Width=1.6
    4  1            0            0            point

Wing "WingGeom"
  location (X Y Z) 4.61112 0 0, rotation 0 0 0
  symmetric about XZ
  bounding box size 3.22515 8.81314 0.22228
  totals: TotalSpan=8.81314 TotalProjectedSpan=8.81314 TotalChord=1.01781 TotalArea=7.9412 TotalAR=9.78083 MAC=1.06018
  root: chord 1.83794, twist 0, CST airfoil ContLERad=1 LowDegree=8 ThickChord=0.118773 UpDegree=8 Au=[0.20037 0.0733 0.27432 0.0264 0.2778 0.16726 0.2176 0.25335 0] Al=[-0.20037 -0.06944 -0.21812 -0.1135 -0.11873 -0.24495 0.10684 0.21754 0]
  sections:
    n  Span     Root_Chord  Tip_Chord  Area     Sweep    Sweep_Location  Dihedral  Twist  Twist_Location  tip airfoil
    1  1.46428  1.83794     0.893789   2.00001  0        1               0         0      0.25            CST airfoil ContLERad=1 LowDegree=8 ThickChord=0.118774 UpDegree=8 Au=[0.20037 0.0733 0.27432 0.0264 0.2778 0.16726 0.2176 0.25335 -0.010202] Al=[-0.20037 -0.06944 -0.21812 -0.1135 -0.11873 -0.24495 0.10684 0.21754 -0.010202]
    2  2.94229  0.893789    0.445703   1.97059  30.3571  0.25            0         0      0.25            as above
  structure "WingGeom_Struct0": Skin

Conformal "ConformalGeom", child of "WingGeom"
  location (X Y Z) 4.61112 0 0, rotation 0 0 0; relative location 0 0 0, rotation 0 0 0
  symmetric about XZ
  bounding box size 1.41498 5.68899 0.00335239
  Design: ChordTrimFlag=1 ChordTrimMax=0.85 ChordTrimMin=0.2537 EtaTrimMax=0.7802 EtaTrimMin=0.1753 L01Max=1 L01Min=1 L0LenTrimMax=4.89566 L0LenTrimMin=0.0848488 LTrimMax=0.9999 LTrimMin=0.0173297 OffSetEnds=1 Offset=0.15 Side1Trim=0.1 Side1TrimFlag=0 Side2Trim=0.1 Side2TrimFlag=0 Side3Trim=0.1 Side3TrimFlag=0 Side4Trim=0.1 Side4TrimFlag=0 UMaxTrimTypeFalg=2 UMinTrimTypeFalg=2 UTrimFlag=1 UTrimMax=0.835406 UTrimMin=0.263772 V1TrimBegin=0.87315 V1TrimEnd=0.12685 V1TrimFlag=1 V2TrimBegin=0.425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

Wing "Horizontal_Stabilizer"
  location (X Y Z) 8 0 0.2, rotation 0 0 0
  symmetric about XZ
  bounding box size 1.19662 2.79993 1.13114
  totals: TotalSpan=3.55057 TotalProjectedSpan=2.79993 TotalChord=0.394508 TotalArea=1.40073 TotalAR=5.59681 MAC=0.43647
  root: chord 0.61736, twist 0, NACA 4-series Camber=0 CamberLoc=0.2 ThickChord=0.1
  sections:
    n  Span     Root_Chord  Tip_Chord  Area      Sweep  Sweep_Location  Dihedral  Twist  Twist_Location  tip airfoil
    1  1.77529  0.61736     0.171656   0.700364  30     0               37.9464   0      0.25            as above

Stack "Fuselage_Engine"
  location (X Y Z) 6.5 0 1.1, rotation 0 0 0
  bounding box size 3.21296 1.08655 1.08654
  cross sections:
    n  XDelta  YDelta  ZDelta  shape
    0  0       0       0       super ellipse Super_Height=0.71 Super_M=2 Super_MaxWidthLoc=-0.4 Super_N=2 Super_Width=0.71
    1  2.2     0       0       super ellipse Super_Height=0.53 Super_M=2 Super_MaxWidthLoc=-0.4 Super_N=2 Super_Width=0.53
    2  -2.2    0       0       super ellipse Super_Height=0.71 Super_M=2 Super_MaxWidthLoc=-0.4 Super_N=2 Super_Width=0.71
