OpenVSP model (file version 5), 4 components.
Geometry view with OpenVSP parameter names; values to 6 digits, angles in degrees, lengths in the model's unit.
Overall bounding box: X_Min=0 X_Len=15 Y_Min=-10 Y_Len=20 Z_Min=-1.08776 Z_Len=4.85172

Fuselage "FuselageGeom"
  location (X Y Z) 0 0 0, rotation 0 0 0
  bounding box size 15 2.60632 2.17551
  Design: Length=15
  cross sections:
    n  XLocPercent  YLocPercent  ZLocPercent  shape
    0  0            0            0            point
    1  0.25         0            0            rounded rectangle RoundRectXSec_KeyCorner=1 RoundRectXSec_Radius=0.71812 RoundRectXSec_RadiusBL=0.18898 RoundRectXSec_RadiusBR=0.18898 RoundRectXSec_RadiusTL=0.71812 RoundRect_Keystone=0.57143 RoundedRect_Height=1.85714 RoundedRect_RadiusSymmetryType=1 RoundedRect_Width=2.2449
    2  0.5          0            0            rounded rectangle RoundRectXSec_Radius=0.765 RoundRect_Keystone=0.58929 RoundedRect_Height=2.17551 RoundedRect_Width=2.5
    3  0.75         0            0            rounded rectangle RoundRectXSec_Radius=0.765 RoundRect_Keystone=0.60357 RoundedRect_Height=1.96327 RoundedRect_Width=2.5
    4  1            0            0            point

Wing "WingGeom"
  location (X Y Z) 5 0 0, rotation 0 0 0
  symmetric about XZ
  bounding box size 7.27378 20 0.365025
  totals: TotalSpan=20 TotalProjectedSpan=20 TotalChord=2.25 TotalArea=45 TotalAR=8.88889 MAC=2.33333
  root: chord 3, twist 0, NACA 4-series Camber=0.02 CamberLoc=0.4 ThickChord=0.12
  sections:
    n  Span  Root_Chord  Tip_Chord  Area  Sweep  Sweep_Location  Dihedral  Twist  Twist_Location  tip airfoil
    1  10    3           1.5        22.5  30     0               0         0      0.25            as above
  structure "WingGeom_Struct0": Skin, Rib0, Rib1, Rib2, Rib3, Rib4, Rib5, Rib6, Rib7, Rib8, Rib9

Wing "Horizontal_Stabilizer"
  location (X Y Z) 10 0 0.5, rotation 0 0 0
  symmetric about XZ
  bounding box size 4 7.66044 3.46408
  totals: TotalSpan=10 TotalProjectedSpan=7.66044 TotalChord=2.5 TotalArea=25 TotalAR=2.3473 MAC=2.8
  root: chord 4, twist 0, NACA 4-series Camber=0 CamberLoc=0.2 ThickChord=0.1
  sections:
    n  Span  Root_Chord  Tip_Chord  Area  Sweep  Sweep_Location  Dihedral  Twist  Twist_Location  tip airfoil
    1  5     4           1          12.5  30     0               40        0      0.25            as above

Pod "Fuselage_Engine"
  location (X Y Z) 8.5 0 1.5, rotation 0 0 0
  bounding box size 4 1.33333 1.33333
  Design: FineRatio=6 Length=4
